*Heading
** Job name: Cube_E729 Model name: Model-1
** Generated by: Abaqus/CAE 2020
*Preprint, echo=NO, model=NO, history=NO, contact=NO
**
** PARTS
**
*Part, name=Part-1
*Node
      1,          -5.,          -5.,          10.
      2,          -5.,  -3.88888884,          10.
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*Element, type=C3D8R
  1,  101,  102,  112,  111,    1,    2,   12,   11
  2,  102,  103,  113,  112,    2,    3,   13,   12
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*Nset, nset=_PickedSet3, internal, generate
    1,  1000,     1
*Elset, elset=_PickedSet3, internal, generate
   1,  729,    1
** Section: Section-1
*Solid Section, elset=_PickedSet3, material=Material-1
,
*End Part
**
**
** ASSEMBLY
**
*Assembly, name=Assembly
**
*Instance, name=Part-1-1, part=Part-1
*End Instance
**
*End Assembly
**
** MATERIALS
**
*Material, name=Material-1
*Elastic
1., 0.3
