*Heading
** Job name: Cubic_center_beam Model name: Model-1
** Generated by: Abaqus/CAE 2020
*Preprint, echo=NO, model=NO, history=NO, contact=NO
**
** PARTS
**
*Part, name=CUBIC_CENTER
*Node
      1,          0.5,          0.5,         -0.5
      2,          0.5,          0.5,          0.5
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*Element, type=B31
  1,   1,  10
  2,  10,  11
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*Elset, elset=ELEM_EDGE
   1,   2,   3,   4,   5,   6
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*Elset, elset=ELEM_INNER
  31,  32,  33,  34,  35,  36
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** Section: Section-0P05  Profile: Profile-0P05
*Beam Section, elset=ELEM_EDGE, material=Material-1, temperature=GRADIENTS, section=CIRC
0.05
0.1,0.,-1.
** Section: Section-0P1  Profile: Profile-0P1
*Beam Section, elset=ELEM_INNER, material=Material-1, temperature=GRADIENTS, section=CIRC
0.1
0.1,0.,-1.
*End Part
**
**
** ASSEMBLY
**
*Assembly, name=Assembly
**
*Instance, name=CUBIC_CENTER-1, part=CUBIC_CENTER
*End Instance
**
*End Assembly
**
** MATERIALS
**
*Material, name=Material-1
*Elastic
1., 0.3
** ----------------------------------------------------------------
**
** STEP: Step-1
**
*Step, name=Step-1, nlgeom=NO
*Static
1., 1., 1e-05, 1.
**
** OUTPUT REQUESTS
**
*Restart, write, frequency=0
**
** FIELD OUTPUT: F-Output-1
**
*Output, field, variable=PRESELECT
**
** HISTORY OUTPUT: H-Output-1
**
*Output, history, variable=PRESELECT
*End Step
