*Heading
** Job name: Cubic_center_solid Model name: cubic_center_reflect_g
** Generated by: Abaqus/CAE 2020
*Preprint, echo=NO, model=NO, history=NO, contact=NO
**
** PARTS
**
*Part, name=PART-1
*Node
  25163, -0.122474484, -1.60472982e-10, -1.60473079e-10
  25164, -0.132692173, 1.11799159e-06, -0.0239855535
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*Element, type=C3D4
120398, 27368, 27374, 26061, 26844
120399, 26738, 27379, 27371, 26844
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*Elset, elset=_PickedSet2, internal
 120398, 120399, 120400, 120401, 120402, 120403
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** Section: Section-1
*Solid Section, elset=_PickedSet2, material=Material-1
,
*End Part
**
**
** ASSEMBLY
**
*Assembly, name=Assembly
**
*Instance, name=PART-1-1, part=PART-1
*End Instance
**
*Elset, elset=ELE_ALL, instance=PART-1-1
 120398, 120399, 120400, 120401, 120402, 120403
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*End Assembly
**
** MATERIALS
**
*Material, name=Material-1
*Elastic
1., 0.3
