*Heading
** Job name: Hexagonal_honeycomb_shellNEWr Model name: Hexagonal_honeycomb_shellNEW
** Generated by: Abaqus/CAE 2020
*Preprint, echo=NO, model=NO, history=NO, contact=NO
**
** PARTS
**
*Part, name=PART-1
*Node
      1,          -1.,   1.73205078,           0.
      2,          -1.,   1.73205078,  0.100000001
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*Element, type=S4
   1,   84,   87,   88,   83
   2,   83,   88,   79,   80
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*Elset, elset=_PICKEDSET2, internal, generate
  801,  1000,     1
*Elset, elset=_PICKEDSET3, internal, generate
   1,  200,    1
*Elset, elset=_PICKEDSET4, internal, generate
 1201,  1400,     1
*Elset, elset=_PICKEDSET5, internal
  201,  202,  203,  204,  205,  206
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** Section: Section-1-_PICKEDSET3
*Shell Section, elset=_PICKEDSET3, material=MATERIAL-1, offset=SPOS
0.05, 5
** Section: Section-2-_PICKEDSET5
*Shell Section, elset=_PICKEDSET5, material=MATERIAL-1
0.05, 5
** Section: Section-3-_PICKEDSET2
*Shell Section, elset=_PICKEDSET2, material=MATERIAL-1
0.1, 5
** Section: Section-4-_PICKEDSET4
*Shell Section, elset=_PICKEDSET4, material=MATERIAL-1, offset=SPOS
0.05, 5
*End Part
**
**
** ASSEMBLY
**
*Assembly, name=Assembly
**
*Instance, name=PART-1-1, part=PART-1
*End Instance
**
*End Assembly
**
** MATERIALS
**
*Material, name=MATERIAL-1
*Elastic
1., 0.3
