*Heading
** Job name: Lattice_Hybrid_model Model name: Model-1
** Generated by: Abaqus/CAE 2020
*Preprint, echo=NO, model=NO, history=NO, contact=NO
**
** PARTS
**
*Part, name=lattice_hybrid
*Node
      1,          -1.,          -1.,          -1.
      2,          -1.,          -1., -0.800000012
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*Element, type=S3
  1, 195, 196, 194
  2, 204, 231, 193
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*Element, type=B31
217, 108, 109
218, 109,  46
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*Elset, elset=_PickedSet3, internal, generate
   1,  216,    1
*Elset, elset=_PickedSet4, internal
 229, 230, 231, 232, 233, 234
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*Elset, elset=_PickedSet5, internal
 239, 240, 241, 242, 243, 244
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*Elset, elset=_PickedSet6, internal
 217, 218, 219, 220, 221, 222
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** Section: Section-shell
*Shell Section, elset=_PickedSet3, material=Material-1
0.1, 5
** Section: Section-beam-inner  Profile: Profile-circle-inner
*Beam Section, elset=_PickedSet6, material=Material-1, temperature=GRADIENTS, section=CIRC
0.2
0.1,0.,-1.
** Section: Section-beam-edge  Profile: Profile-circle-edge
*Beam Section, elset=_PickedSet4, material=Material-1, temperature=GRADIENTS, section=CIRC
0.1
0.1,0.,-1.
** Section: Section-beam-face  Profile: Profile-circle-face
*Beam Section, elset=_PickedSet5, material=Material-1, temperature=GRADIENTS, section=CIRC
0.141421
0.1,0.,-1.
*End Part
**
**
** ASSEMBLY
**
*Assembly, name=Assembly
**
*Instance, name=lattice_hybrid-1, part=lattice_hybrid
*End Instance
**
*End Assembly
**
** MATERIALS
**
*Material, name=Material-1
*Elastic
1., 0.3
** ----------------------------------------------------------------
**
** STEP: Step-1
**
*Step, name=Step-1, nlgeom=NO
*Static
1., 1., 1e-05, 1.
**
** OUTPUT REQUESTS
**
*Restart, write, frequency=0
**
** FIELD OUTPUT: F-Output-1
**
*Output, field
*Node Output
RF, RM, RT, U, UR, UT
*Element Output, directions=YES
E, S
**
** HISTORY OUTPUT: H-Output-1
**
*Output, history, variable=PRESELECT
*End Step
