*Heading
** Job name: Octet_beam Model name: Octet_beam
** Generated by: Abaqus/CAE 2020
*Preprint, echo=NO, model=NO, history=NO, contact=NO
**
** PARTS
**
*Part, name=BEAM_OCTET
*Node
      1,  0.707106769,           0.,           0.
      2,  0.707106769,  0.707106769,  0.707106769
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*Element, type=B31
  1,   1,  15
  2,  15,  16
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*Elset, elset=SET-0P04
  41,  42,  43,  44,  45,  46
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*Elset, elset=Set-0P1f
   1,   2,   3,   4,   5,   6
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*Elset, elset=SET-0P1
 111, 112, 113, 114, 115, 116
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** Section: Section-0P1f  Profile: Profile-0P1f
*Beam Section, elset=Set-0P1f, material=MATERIAL-1, temperature=GRADIENTS, section=CIRC
0.0353553
0.1,0.,-1.
** Section: Section-2-SET-0P04  Profile: Profile-2
*Beam Section, elset=SET-0P04, material=MATERIAL-1, temperature=GRADIENTS, section=CIRC
0.02
0.0995037,0.,-0.995037
** Section: Section-1-SET-0P1  Profile: Profile-1
*Beam Section, elset=SET-0P1, material=MATERIAL-1, temperature=GRADIENTS, section=CIRC
0.05
0.0995037,0.,-0.995037
*End Part
**
**
** ASSEMBLY
**
*Assembly, name=Assembly
**
*Instance, name=BEAM_OCTET-1, part=BEAM_OCTET
*End Instance
**
*End Assembly
**
** MATERIALS
**
*Material, name=MATERIAL-1
*Elastic
1., 0.3
