*Heading
** Job name: Truss_sandwich_solid Model name: truss_sandwich_20n
** Generated by: Abaqus/CAE 2020
*Preprint, echo=NO, model=NO, history=NO, contact=NO
**
** PARTS
**
*Part, name=TRUSS_SANDWICH_PLATES
*Node
      1,         26.5,           0.,         13.5
      2,         26.5,          50.,         13.5
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*Element, type=C3D20R
    1,    278,   3209,  17449,   3173,      1,     49,   1769,    162,  91396,  91395,  91394,  91393,  91397,  91398,  91399,
        91400,  91402,  91401,  91403,  91404
    2,   3209,   3210,  17450,  17449,     49,     50,   1770,   1769,  91407,  91406,  91405,  91395,  91408,  91409,  91410,
        91398,  91401,  91411,  91412,  91403
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*Elset, elset=_PickedSet2, internal, generate
     1,  16320,      1
** Section: Section-1
*Solid Section, elset=_PickedSet2, material=Material-1
,
*End Part
**
**
** ASSEMBLY
**
*Assembly, name=Assembly
**
*Instance, name=TRUSS_SANDWICH_PLATES-1, part=TRUSS_SANDWICH_PLATES
*End Instance
**
*End Assembly
**
** MATERIALS
**
*Material, name=Material-1
*Density
 7.85e-09,
*Elastic
206000., 0.3
